m := 1
l := 1
g := 9.81
A := 0.05
w := 20
c := FRAME*10
t_max := 5
z(t) := A*sin(w*t) + A/2
Nt := 5000
Given
m*zm''(t) == -m*g - c*((-l - z(t)) + zm(t))
zm(0) == l
zm'(0) == 0
z_m := Odesolve(t, t_max)
c = 0
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